# Emitter Relaxation

units real
atom_style atomic

read_data data.emitter

pair_style eam/alloy
pair_coeff * * /home1/NoCsBack/numa/tapashree/pyvaporate/bin/W_zhou.eam.alloy W

neighbor 1.0 bin
group inner id 11 13 15 16 19 20 23 40 42 43 44 45 47 48 49 50 51 52 53 54 55 56 57 58 59 60 61 62 63 64 65 66 67 68 69 70 71 72 73 74 75 76 77 78 79 80 81 82 83 84 85 86 87 88 89 90 91 92 93 94 95 97 98 99 105 106 107 108 115 116 117 118 119 120 121 122 123 124 125 126 127 128 129 130 131 132 133 134 135 136 137 138 139 140 141 142 143 144 145 146 147 148 149 150 151 152 153 154 155 156 157 158 159 160 161 162 164 165 167 174 176 177 178 179 180 181 182 183 184 185 186 187 188 189 190 191 192 193 194 195 196 197 198 199 200 201 202 203 204 205 206 207 208 209 210 211 212 213 214 215 216 217 2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
velocity inner set 0 0 0
fix frozen inner setforce 0 0 0

compute cnum all coord/atom cutoff 3.0
dump 1 all custom 1000 cnum.dump c_cnum
fix 1 all nvt temp 50 50 100.0
minimize 1e-08 1e-08 10 10
compute 1 all coord/atom cutoff 3.0
write_dump all custom relaxed_emitter.lmp x y z type c_cnum
